// SBML level 2 version 4

model Boehm_JProteomeRes2014()
  // PEtab implementation of the model from Boehm et al. (2014), J. Proteome Res., 13, 12, 5685-5694
  // isDescribedBy doi:10.1021/pr5006923

  // Compartments:
  compartment cyt = 1.4;
  compartment nuc = 0.45;

  // Species:
  species STAT5A in cyt = 207.6*ratio;
  species STAT5B in cyt = 207.6 - 207.6*ratio;
  species pApB in cyt = 0;
  species pApA in cyt = 0;
  species pBpB in cyt = 0;
  species nucpApA in nuc = 0;
  species nucpApB in nuc = 0;
  species nucpBpB in nuc = 0;

  // Parameters:
  Epo_degradation_BaF3 = 0.02697383;
  k_exp_hetero = 1.000943e-5;
  k_exp_homo = 0.006171931;
  k_imp_hetero = 0.01637085;
  k_imp_homo = 96945.54;
  k_phos = 15766.83;
  ratio = 0.693;
  noiseParameter1_pSTAT5A_rel = 4.11881;
  noiseParameter1_pSTAT5B_rel = 7.043787;
  noiseParameter1_rSTAT5A_rel = 3.369182;
  specC17 = 0.107;

  // Assignment rules:
  sigma_pSTAT5A_rel := noiseParameter1_pSTAT5A_rel;
  sigma_pSTAT5B_rel := noiseParameter1_pSTAT5B_rel;
  sigma_rSTAT5A_rel := noiseParameter1_rSTAT5A_rel;
  observable_pSTAT5A_rel := (100*pApB + 200*pApA*specC17)/(pApB + STAT5A*specC17 + 2*pApA*specC17);
  BaF3_Epo := 0.000000125*exp(-1*Epo_degradation_BaF3*time);
  observable_pSTAT5B_rel := -(100*pApB - 200*pBpB*(specC17 - 1))/(STAT5B*(specC17 - 1) - pApB + 2*pBpB*(specC17 - 1));
  observable_rSTAT5A_rel := (100*pApB + 100*STAT5A*specC17 + 200*pApA*specC17)/(2*pApB + STAT5A*specC17 + 2*pApA*specC17 - STAT5B*(specC17 - 1) - 2*pBpB*(specC17 - 1));

  // Reactions:
  v1_v_0: 2 STAT5A => pApA; cyt*BaF3_Epo*STAT5A^2*k_phos;
  v2_v_1: STAT5A + STAT5B => pApB; cyt*BaF3_Epo*STAT5A*STAT5B*k_phos;
  v3_v_2: 2 STAT5B => pBpB; cyt*BaF3_Epo*STAT5B^2*k_phos;
  v4_v_3: pApA => nucpApA; cyt*k_imp_homo*pApA;
  v5_v_4: pApB => nucpApB; cyt*k_imp_hetero*pApB;
  v6_v_5: pBpB => nucpBpB; cyt*k_imp_homo*pBpB;
  v7_v_6: nucpApA => 2 STAT5A; nuc*k_exp_homo*nucpApA;
  v8_v_7: nucpApB => STAT5A + STAT5B; nuc*k_exp_hetero*nucpApB;
  v9_v_8: nucpBpB => 2 STAT5B; nuc*k_exp_homo*nucpBpB;

  // Unit definitions:
  unit time = 60 second;
end
